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/BATCH
/COM,ANSYS RELEASE 2020 R1           BUILD 20.1      UP20191203       14:03:06
/input,menust,tmp,''
/GST,ON
/PLO,INFO,3
/GRO,CURL,ON
/CPLANE,1
WPSTYLE,,,,,,,,0
!=======================================================
!/exit
!========================================================
! Wandscheibe mit �ffnungen
! Einheiten: [kN],[m]
!========================================================
/nerr,0
*do,j,1,10,1
/com,
*enddo
/COM *** 5.2.2 ANSYS APDL ***
finish
/clear,start
/COM,ANSYS RELEASE 2020 R1           BUILD 20.1      UP20191203       14:06:49
/input,start,ans,'C:\Program Files\ANSYS Inc\v201\ANSYS\apdl\'
meshsize=0.5
verfein=2
steps=3
*DIM,results,TABLE,steps,6
*TAXIS,results(1,1),1,1.,2.,3.,4.,5.,6.,7.,8.,9.,10.,
*TAXIS,results(1,1),2,1.,2.,3.,4.,5.,6.
*dim, c,, steps,10, 1 ! Example Matrix
*SET,enow , 0
*do, ct, 1, 10
*do, ct2, 1, 10
*SET,c(ct,ct2) , ct*ct2
*enddo
*enddo
!!! Writes out Matrix to matlab
*dmat, exportmatrix, D, import, APDL, c ! export to matrix file
*export, exportmatrix, mmf, mytemp.mtx
! *** loop to restart the calculation ***
!------------------------------------------------
*do,j,1,steps,1
/com,  %j%  %meshsize%
*SET,results(j,1) , meshsize
parsav,all
finish
/clear,start
/COM,ANSYS RELEASE 2020 R1           BUILD 20.1      UP20191203       14:07:03
/input,start,ans,'C:\Program Files\ANSYS Inc\v201\ANSYS\apdl\'
parres
/prep7
blc4,0,0,10,10
blc4,5,0,5,5
asba,1,2
ET,1,PLANE182
KEYOPT,1,1,0
KEYOPT,1,3,3
KEYOPT,1,6,0
r,1,0.2
mp,ex,1,30000000
mp,prxy,1,0.2
dl,9,,all
sfl,3,pres,250
esize,meshsize
amesh,all
cpintf,all
FINISH
/SOL
solve
FINISH
/POST1
! maximale Verschiebung bei 10;10
allsel
nsel,s,loc,x,10
nsel,r,loc,y,10
*get,u,NODE,NDNEXT(0),u,y
*SET,results(j,3) , u
PATH,hori,2,30,5000
PPATH,1,0,0,3,,0,
PPATH,2,0,5,3,,0,
PDEF,sy,S,Y,NOAVG
PCALC,INTG,intsy,SY,XG,1,
PAGET,array_hori,TABL
*SET,syh,array_hori(5001,6)
*DEL,array_hori
*SET,results(j,4),syh
allsel
*get,nn,NODE,0,count
*SET,results(j,2),nn*2
!! Netzgroesse anpassen
*SET,meshsize , meshsize/verfein
*enddo
/COM,ANSYS RELEASE 2020 R1           BUILD 20.1      UP20191203       14:07:09
*do,j,1,steps,1
/com,  %j%   %results(j,1)%   %results(j,2)%   %results(j,3)%   %results(j,4)%   %results(j,5)%   %results(j,6)%
*enddo
/gcol,1,max_u
*VPLOT,results(1,2),results(1,3)
weiter=1
/gcol,1,GG
*VPLOT,results(1,2),results(1,4)
weiter=1
*do,j,1,steps,1
/com,  %j%   %results(j,1)%   %results(j,2)%   %results(j,3)%   %results(j,4)%   %results(j,5)%   %results(j,6)%
*enddo
! *** exit the programm ***
!------------------------------------------------
finish
!/exit
/AUX12
FINISH
/POST26
FILE,'1011','rst','.'
NUMVAR,200
SOLU,191,NCMIT
STORE,MERGE
FILLDATA,191,,,,1,1
REALVAR,191,191
FINISH
/POST1
/SHOW,WIN32C
SET,FIRST
/PLOPTS,INFO,3
/CONTOUR,ALL,18
/NUMBER,1
! /UIS,ABORT,1
/SHOW,WIN32
! clear
! \Clear
! lcle
! \CLEAR,NOSTART
FINISH
FINISH
! \CLEAR,NOSTART
/NOPR   ! Suppress printing of UNDO process
/PMACRO ! Echo following commands to log
FINISH  ! Make sure we are at BEGIN level
/CLEAR,NOSTART  ! Clear model since no SAVE found
/COM,ANSYS RELEASE 2020 R1           BUILD 20.1      UP20191203       14:14:54
!Create House
! BLC4,0,0,8,8
! BLC4,1,0,1,2
! BLC4,5,5,1.5,1.5
! BLC4,2.5,5,1.5,1.5
/NOPR   ! Suppress printing of UNDO process
/PMACRO ! Echo following commands to log
FINISH  ! Make sure we are at BEGIN level
/CLEAR,NOSTART  ! Clear model since no SAVE found
/COM,ANSYS RELEASE 2020 R1           BUILD 20.1      UP20191203       14:15:33
!* Material Parameter und Materialmodelle
/PREP7
ET,1,PLANE182
KEYOPT,1,1,0
KEYOPT,1,3,3
KEYOPT,1,6,0
R,1,0.5,
MPTEMP,,,,,,,,
MPTEMP,1,0
MPDATA,EX,1,,6E7
MPDATA,PRXY,1,,0.2
!Create House
BLC4,0,0,8,8 !House
BLC4,1,0,1,2 !Door
BLC4,5,5,1.5,1.5 !Window
BLC4,2.5,5,1.5,1.5 !2nd Window
!========================================================
! Wandscheibe mit �ffnungen
! Einheiten: [kN],[m]
!========================================================
/nerr,0
*do,j,1,10,1
/com,
*enddo
/COM *** 5.2.2 ANSYS APDL ***
finish
/clear,start
/COM,ANSYS RELEASE 2020 R1           BUILD 20.1      UP20191203       14:17:06
/input,start,ans,'C:\Program Files\ANSYS Inc\v201\ANSYS\apdl\'
meshsize=0.5
verfein=2
steps=3
*DIM,results,TABLE,steps,6
*TAXIS,results(1,1),1,1.,2.,3.,4.,5.,6.,7.,8.,9.,10.,
*TAXIS,results(1,1),2,1.,2.,3.,4.,5.,6.
*dim, c,, steps,10, 1 ! Example Matrix
*SET,enow , 0
*do, ct, 1, 10
*do, ct2, 1, 10
*SET,c(ct,ct2) , 0
*enddo
*enddo
!!! Writes out Matrix to matlab
*dmat, exportmatrix, D, import, APDL, c ! export to matrix file
*export, exportmatrix, mmf, mytemp.mtx
! *** loop to restart the calculation ***
!------------------------------------------------
*do,j,1,steps,1
/com,  %j%  %meshsize%
*SET,results(j,1) , meshsize
parsav,all
finish
/clear,start
/COM,ANSYS RELEASE 2020 R1           BUILD 20.1      UP20191203       14:17:15
/input,start,ans,'C:\Program Files\ANSYS Inc\v201\ANSYS\apdl\'
parres
/prep7
blc4,0,0,10,10
blc4,5,0,5,5
asba,1,2
ET,1,PLANE182
KEYOPT,1,1,0
KEYOPT,1,3,3
KEYOPT,1,6,0
r,1,0.2
mp,ex,1,30000000
mp,prxy,1,0.2
dl,9,,all
sfl,3,pres,250
esize,meshsize
amesh,all
cpintf,all
FINISH
/SOL
solve
FINISH
/POST1
! maximale Verschiebung bei 10;10
allsel
nsel,s,loc,x,10
nsel,r,loc,y,10
*get,u,NODE,NDNEXT(0),u,y
*SET,results(j,3) , u
*SET,c(j,3) , u
PATH,hori,2,30,5000
PPATH,1,0,0,3,,0,
PPATH,2,0,5,3,,0,
PDEF,sy,S,Y,NOAVG
PCALC,INTG,intsy,SY,XG,1,
PAGET,array_hori,TABL
*SET,syh,array_hori(5001,6)
*DEL,array_hori
*SET,results(j,4),syh
allsel
*get,nn,NODE,0,count
*SET,results(j,2),nn*2
!! Netzgroesse anpassen
*SET,meshsize , meshsize/verfein
*enddo
/COM,ANSYS RELEASE 2020 R1           BUILD 20.1      UP20191203       14:17:20
*do,j,1,steps,1
/com,  %j%   %results(j,1)%   %results(j,2)%   %results(j,3)%   %results(j,4)%   %results(j,5)%   %results(j,6)%
*enddo
/gcol,1,max_u
*VPLOT,results(1,2),results(1,3)
weiter=1
/gcol,1,GG
*VPLOT,results(1,2),results(1,4)
weiter=1
*do,j,1,steps,1
/com,  %j%   %results(j,1)%   %results(j,2)%   %results(j,3)%   %results(j,4)%   %results(j,5)%   %results(j,6)%
*enddo
! *** exit the programm ***
!------------------------------------------------
finish
!/exit
!========================================================
! Wandscheibe mit �ffnungen
! Einheiten: [kN],[m]
!========================================================
/nerr,0
*do,j,1,10,1
/com,
*enddo
/COM *** 5.2.2 ANSYS APDL ***
finish
/clear,start
/COM,ANSYS RELEASE 2020 R1           BUILD 20.1      UP20191203       14:19:40
/input,start,ans,'C:\Program Files\ANSYS Inc\v201\ANSYS\apdl\'
meshsize=0.5
verfein=2
steps=3
*DIM,results,TABLE,steps,6
*TAXIS,results(1,1),1,1.,2.,3.,4.,5.,6.,7.,8.,9.,10.,
*TAXIS,results(1,1),2,1.,2.,3.,4.,5.,6.
*dim, c,, steps,10, 1 ! Example Matrix
*SET,enow , 0
*do, ct, 1, 10
*do, ct2, 1, 10
*SET,c(ct,ct2) , 0
*enddo
*enddo
! *** loop to restart the calculation ***
!------------------------------------------------
*do,j,1,steps,1
/com,  %j%  %meshsize%
*SET,results(j,1) , meshsize
parsav,all
finish
/clear,start
/COM,ANSYS RELEASE 2020 R1           BUILD 20.1      UP20191203       14:19:48
/input,start,ans,'C:\Program Files\ANSYS Inc\v201\ANSYS\apdl\'
parres
/prep7
blc4,0,0,10,10
blc4,5,0,5,5
asba,1,2
ET,1,PLANE182
KEYOPT,1,1,0
KEYOPT,1,3,3
KEYOPT,1,6,0
r,1,0.2
mp,ex,1,30000000
mp,prxy,1,0.2
dl,9,,all
sfl,3,pres,250
esize,meshsize
amesh,all
cpintf,all
FINISH
/SOL
solve
FINISH
/POST1
! maximale Verschiebung bei 10;10
allsel
nsel,s,loc,x,10
nsel,r,loc,y,10
*get,u,NODE,NDNEXT(0),u,y
*SET,results(j,3) , u
*SET,c(j,3) , u
PATH,hori,2,30,5000
PPATH,1,0,0,3,,0,
PPATH,2,0,5,3,,0,
PDEF,sy,S,Y,NOAVG
PCALC,INTG,intsy,SY,XG,1,
PAGET,array_hori,TABL
*SET,syh,array_hori(5001,6)
*DEL,array_hori
*SET,results(j,4),syh
allsel
*get,nn,NODE,0,count
*SET,results(j,2),nn*2
!! Netzgroesse anpassen
*SET,meshsize , meshsize/verfein
*enddo
/COM,ANSYS RELEASE 2020 R1           BUILD 20.1      UP20191203       14:19:52
!!! Writes out Matrix to matlab
*dmat, exportmatrix, D, import, APDL, c ! export to matrix file
*export, exportmatrix, mmf, mytemp.mtx
! *** exit the programm ***
!------------------------------------------------
finish
!/exit
!========================================================
! Wandscheibe mit �ffnungen
! Einheiten: [kN],[m]
!========================================================
/nerr,0
*do,j,1,10,1
/com,
*enddo
/COM *** 5.2.2 ANSYS APDL ***
finish
/clear,start
/COM,ANSYS RELEASE 2020 R1           BUILD 20.1      UP20191203       14:36:48
/input,start,ans,'C:\Program Files\ANSYS Inc\v201\ANSYS\apdl\'
*SET,meshsize , 0.5
*SET,verfein , 2
*SET,steps , 3
startVal=5
*DIM,results,TABLE,steps,6
*TAXIS,results(1,1),1,1.,2.,3.,4.,5.,6.,7.,8.,9.,10.,
*TAXIS,results(1,1),2,1.,2.,3.,4.,5.,6.
*dim, c,, steps,10, 1 ! Example Matrix
*SET,enow , 0
*do, ct, 1, 10
*do, ct2, 1, 10
*SET,c(ct,ct2) , 0
*enddo
*enddo
! *** loop to restart the calculation ***
!------------------------------------------------
*do,j,1,steps,1
/com,  %j%  %meshsize%
*SET,results(j,1) , meshsize
parsav,all
finish
/clear,start
/COM,ANSYS RELEASE 2020 R1           BUILD 20.1      UP20191203       14:36:55
/input,start,ans,'C:\Program Files\ANSYS Inc\v201\ANSYS\apdl\'
parres
/prep7
blc4,0,0,10,10
blc4,5,0,5,5
asba,1,2
!-----------------
! Material
!
ET,1,PLANE182
KEYOPT,1,1,0
KEYOPT,1,3,3
KEYOPT,1,6,0
r,1,0.2
mp,ex,1,30000000
mp,prxy,1,0.2
dl,9,,all
sfl,3,pres,250
!----------------
! Mesh
!
esize,meshsize
amesh,all
cpintf,all
FINISH
/SOL
solve
FINISH
/POST1
! maximale Verschiebung bei 4,4
allsel
nsel,s,loc,x,4 !select
nsel,r,loc,y,4 !reselect
*get,u,NODE,NDNEXT(0),u,y
*SET,results(j,3) , u
*SET,c(j,3) , u
PATH,hori,2,30,5000
PPATH,1,0,0,3,,0,
PPATH,2,0,5,3,,0,
PDEF,sy,S,Y,NOAVG
PCALC,INTG,intsy,SY,XG,1,
PAGET,array_hori,TABL
*SET,syh,array_hori(5001,6)
*DEL,array_hori
*SET,results(j,4),syh
allsel
*get,nn,NODE,0,count
*SET,results(j,2),nn*2
!! Netzgroesse anpassen
*SET,meshsize , meshsize/verfein
*enddo
/COM,ANSYS RELEASE 2020 R1           BUILD 20.1      UP20191203       14:36:59
!!! Writes out Matrix to matlab
*dmat, exportmatrix, D, import, APDL, c ! export to matrix file
*export, exportmatrix, mmf, mytemp.mtx
! *** exit the programm ***
!------------------------------------------------
finish
!/exit
!========================================================
! Wandscheibe mit �ffnungen
! Einheiten: [kN],[m]
!========================================================
/nerr,0
*do,j,1,10,1
/com,
*enddo
/COM *** 5.2.2 ANSYS APDL ***
finish
/clear,start
/COM,ANSYS RELEASE 2020 R1           BUILD 20.1      UP20191203       14:38:13
/input,start,ans,'C:\Program Files\ANSYS Inc\v201\ANSYS\apdl\'
*SET,meshsize , 0.5
*SET,verfein , 1
*SET,steps , 30
startVal=98
*DIM,results,TABLE,steps,6
*TAXIS,results(1,1),1,1.,2.,3.,4.,5.,6.,7.,8.,9.,10.,
*TAXIS,results(1,1),2,1.,2.,3.,4.,5.,6.
*dim, c,, steps,10, 1 ! Example Matrix
*SET,enow , 0
*do, ct, 1, 10
*do, ct2, 1, 10
*SET,c(ct,ct2) , 0
*enddo
*enddo
! *** loop to restart the calculation ***
!------------------------------------------------
*do,j,1,steps,1
/com,  %j%  %meshsize%
*SET,results(j,1) , meshsize
parsav,all
finish
/clear,start
/COM,ANSYS RELEASE 2020 R1           BUILD 20.1      UP20191203       14:38:18
/input,start,ans,'C:\Program Files\ANSYS Inc\v201\ANSYS\apdl\'
parres
/prep7
blc4,0,0,10,10
blc4,5,0,5,5
asba,1,2
!-----------------
! Material
!
ET,1,PLANE182
KEYOPT,1,1,0
KEYOPT,1,3,3
KEYOPT,1,6,0
r,1,0.2
mp,ex,1,30000000
mp,prxy,1,0.2
dl,9,,all
sfl,3,pres,250
!----------------
! Mesh
!
esize,meshsize
amesh,all
cpintf,all
FINISH
/SOL
solve
FINISH
/POST1
! maximale Verschiebung bei 4,4
allsel
nsel,s,loc,x,4 !select
nsel,r,loc,y,4 !reselect
*get,u,NODE,NDNEXT(0),u,y
*SET,results(j,3) , u
*SET,c(j,3) , u
PATH,hori,2,30,5000
PPATH,1,0,0,3,,0,
PPATH,2,0,5,3,,0,
PDEF,sy,S,Y,NOAVG
PCALC,INTG,intsy,SY,XG,1,
PAGET,array_hori,TABL
*SET,syh,array_hori(5001,6)
*DEL,array_hori
*SET,results(j,4),syh
allsel
*get,nn,NODE,0,count
*SET,results(j,2),nn*2
!! Netzgroesse anpassen
*SET,meshsize , meshsize/verfein
*enddo
/COM,ANSYS RELEASE 2020 R1           BUILD 20.1      UP20191203       14:38:39
!!! Writes out Matrix to matlab
*dmat, exportmatrix, D, import, APDL, c ! export to matrix file
*export, exportmatrix, mmf, mytemp.mtx
! *** exit the programm ***
!------------------------------------------------
finish
!/exit
!========================================================
! Wandscheibe mit �ffnungen
! Einheiten: [kN],[m]
!========================================================
/nerr,0
*do,j,1,10,1
/com,
*enddo
/COM *** 5.2.2 ANSYS APDL ***
finish
/clear,start
/COM,ANSYS RELEASE 2020 R1           BUILD 20.1      UP20191203       14:42:22
/input,start,ans,'C:\Program Files\ANSYS Inc\v201\ANSYS\apdl\'
*SET,meshsize , 0.5
*SET,verfein , 1
*SET,steps , 30
startVal=2
*DIM,results,TABLE,steps,6
*TAXIS,results(1,1),1,1.,2.,3.,4.,5.,6.,7.,8.,9.,10.,
*TAXIS,results(1,1),2,1.,2.,3.,4.,5.,6.
*dim, c,, steps,10, 1 ! Example Matrix
*SET,enow , 0
*do, ct, 1, 10
*do, ct2, 1, 10
*SET,c(ct,ct2) , 0
*enddo
*enddo
! *** loop to restart the calculation ***
!------------------------------------------------
*do,j,1,steps,1
/com,  %j%  %meshsize%
*SET,results(j,1) , meshsize
parsav,all
finish
/clear,start
/COM,ANSYS RELEASE 2020 R1           BUILD 20.1      UP20191203       14:42:26
/input,start,ans,'C:\Program Files\ANSYS Inc\v201\ANSYS\apdl\'
parres
/prep7
!-----------------
!Create House
!-----------------
BLC4,0,0,8,8 !House
BLC4,1,0,1,2 !Door
BLC4,5,5,1.5,1.5 !Window
BLC4,2.5,5,1.5,1.5 !2nd Window
FLST,3,3,5,ORDE,2
FITEM,3,2
FITEM,3,-4
ASBA,       1,P51X
!blc4,0,0,10,10
!blc4,5,0,5,5
!asba,1,2
!-----------------
! Material
!-----------------
ET,1,PLANE182
KEYOPT,1,1,0
KEYOPT,1,3,3
KEYOPT,1,6,0
r,1,0.2
mp,ex,1,30000000
mp,prxy,1,0.2
dl,9,,all
sfl,3,pres,250
!----------------
! Mesh
!
esize,meshsize
amesh,all
cpintf,all
FINISH
/SOL
solve
FINISH
/POST1
! maximale Verschiebung bei 4,4
allsel
nsel,s,loc,x,4 !select
nsel,r,loc,y,4 !reselect
*get,u,NODE,NDNEXT(0),u,y
*SET,results(j,3) , u
*SET,c(j,3) , u
*enddo
/COM,ANSYS RELEASE 2020 R1           BUILD 20.1      UP20191203       14:42:44
!!! Writes out Matrix to matlab
*dmat, exportmatrix, D, import, APDL, c ! export to matrix file
*export, exportmatrix, mmf, mytemp.mtx
! *** exit the programm ***
!------------------------------------------------
finish
!/exit
