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/BATCH
/COM,ANSYS RELEASE 2020 R1           BUILD 20.1      UP20191203       12:25:58
/input,menust,tmp,''
/GST,ON
/PLO,INFO,3
/GRO,CURL,ON
/CPLANE,1
WPSTYLE,,,,,,,,0
! data
!========================================================
! Wandscheibe mit �ffnungen
! Einheiten: [kN],[m]
!========================================================
/nerr,0
*do,j,1,10,1
/com,
*enddo
/COM *** 5.2.2 ANSYS APDL ***
finish
/clear,start
/COM,ANSYS RELEASE 2020 R1           BUILD 20.1      UP20191203       12:27:04
/input,start,ans,'C:\Program Files\ANSYS Inc\v201\ANSYS\apdl\'
meshsize=0.5
verfein=2
steps=3
*DIM,results,TABLE,steps,6
*TAXIS,results(1,1),1,1.,2.,3.,4.,5.,6.,7.,8.,9.,10.,
*TAXIS,results(1,1),2,1.,2.,3.,4.,5.,6.
! *** loop to restart the calculation ***
!------------------------------------------------
*do,j,1,steps,1
/com,  %j%  %meshsize%
*SET,results(j,1) , meshsize
parsav,all
finish
/clear,start
/COM,ANSYS RELEASE 2020 R1           BUILD 20.1      UP20191203       12:27:14
/input,start,ans,'C:\Program Files\ANSYS Inc\v201\ANSYS\apdl\'
parres
/prep7
blc4,0,0,10,10
blc4,5,0,5,5
asba,1,2
ET,1,PLANE182
KEYOPT,1,1,0
KEYOPT,1,3,3
KEYOPT,1,6,0
r,1,0.2
mp,ex,1,30000000
mp,prxy,1,0.2
dl,9,,all
sfl,3,pres,250
esize,meshsize
amesh,all
cpintf,all
FINISH
/SOL
solve
FINISH
/POST1
! maximale Verschiebung bei 10;10
allsel
nsel,s,loc,x,10
nsel,r,loc,y,10
*get,u,NODE,NDNEXT(0),u,y
*SET,results(j,3) , u
PATH,hori,2,30,5000
PPATH,1,0,0,3,,0,
PPATH,2,0,5,3,,0,
PDEF,sy,S,Y,NOAVG
PCALC,INTG,intsy,SY,XG,1,
PAGET,array_hori,TABL
*SET,syh,array_hori(5001,6)
*DEL,array_hori
*SET,results(j,4),syh
allsel
*get,nn,NODE,0,count
*SET,results(j,2),nn*2
!! Netzgroesse anpassen
*SET,meshsize , meshsize/verfein
*enddo
/COM,ANSYS RELEASE 2020 R1           BUILD 20.1      UP20191203       12:27:21
*do,j,1,steps,1
/com,  %j%   %results(j,1)%   %results(j,2)%   %results(j,3)%   %results(j,4)%   %results(j,5)%   %results(j,6)%
*enddo
/gcol,1,max_u
*VPLOT,results(1,2),results(1,3)
weiter=1
/gcol,1,GG
*VPLOT,results(1,2),results(1,4)
weiter=1
*do,j,1,steps,1
/com,  %j%   %results(j,1)%   %results(j,2)%   %results(j,3)%   %results(j,4)%   %results(j,5)%   %results(j,6)%
*enddo
*dmat, exportmatrix, D, import, APDL, result ! export to matrix file
