!========================================================
! Wandscheibe mit �ffnungen
! Einheiten: [kN],[m]
!========================================================


/nerr,0

*do,j,1,10,1
/com,
*enddo
/COM *** 5.2.2 ANSYS APDL ***

finish
/clear,start

meshsize = 0.5
verfein = 2
steps = 3
*ask,startVal,Anfangswert,0

*DIM,results,TABLE,steps,6
*TAXIS,results(1,1),1,1.,2.,3.,4.,5.,6.,7.,8.,9.,10.,
*TAXIS,results(1,1),2,1.,2.,3.,4.,5.,6.

*dim, c,, steps,10, 1 ! Example Matrix
enow = 0
*do, ct, 1, 10
    *do, ct2, 1, 10
        c(ct,ct2) = 0
    *enddo
*enddo


! *** loop to restart the calculation ***
!------------------------------------------------
*do,j,1,steps,1


/com,  %j%  %meshsize%
results(j,1) = meshsize


parsav,all
finish
/clear,start
parres


/prep7

blc4,0,0,10,10
blc4,5,0,5,5

asba,1,2
!-----------------
! Material
!
ET,1,PLANE182
KEYOPT,1,1,0
KEYOPT,1,3,3
KEYOPT,1,6,0

r,1,0.2

mp,ex,1,30000000
mp,prxy,1,0.2

dl,9,,all
sfl,3,pres,250

!----------------
! Mesh
!
esize,meshsize
amesh,all
cpintf,all

/solu
solve

/post1


! maximale Verschiebung bei 4,4
allsel
nsel,s,loc,x,4 !select
nsel,r,loc,y,4 !reselect
*get,u,NODE,NDNEXT(0),u,y
results(j,3) = u
c(j,3) = u


PATH,hori,2,30,5000
PPATH,1,0,0,3,,0,
PPATH,2,0,5,3,,0,
PDEF,sy,S,Y,NOAVG
PCALC,INTG,intsy,SY,XG,1,
PAGET,array_hori,TABL
syh=array_hori(5001,6)
*DEL,array_hori

results(j,4)=syh


allsel
*get,nn,NODE,0,count
results(j,2)=nn*2


!! Netzgroesse anpassen
meshsize = meshsize/verfein


*enddo


!!! Writes out Matrix to matlab
*dmat, exportmatrix, D, import, APDL, c ! export to matrix file
*export, exportmatrix, mmf, mytemp.mtx


! *** exit the programm ***
!------------------------------------------------
finish
!/exit
